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/batch
! ANSYS input file written by Workbench version 2019 R1
! File used for geometry attach: D:\SPSProjects\ANSYS_projects\boltedFlange_files\dp0\SYS\DM\SYS.agdb
/title,boltedFlange--Static Structural (A5)
/com,--- Data in consistent BIN units. See Solving Units in the help system for more information.
/units,BIN
/prep7
! Turn off shape checking because checks already performed inside WB mesher.
! See help system for more information.
SHPP,OFF,,NOWARN
etcon,set             ! allow ANSYS to choose best KEYOP's for 180x elements
/com,*********** Nodes for the whole assembly ***********
nblock,3,,28706
(1i9,3e20.9e3)
        1     1.559719371E-01     5.643324054E+01     7.946683233E+01
        2     6.875874935E-02     5.651924309E+01     7.969324265E+01
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-1
/com,*********** Elements for Body 1 "MidNozzle" ***********
et,1,187
eblock,19,solid,,16
(19i9)
        1        1        1        1        0        0        0        0       10        0      614     2613     4846     3990     2616     6013    10412     6009     6006
     6026     6024
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-1
et,2,186
keyo,2,2,1          ! set full integration on SOLID186
eblock,19,solid,,1695
(19i9)
        1        2        1        1        0        0        0        0       20        0      630     3979     3987     4832     4816     3980     3983     5931     4839
    10385    10403    12341    10386    10388    10397    12389    10389    10384    10396    12375    12342
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-1
/com,*********** Elements for Body 3 "LowerNozzle" ***********
et,3,187
eblock,19,solid,,56
(19i9)
        3        3        3        3        0        0        0        0       10        0     2325    14371    16359    14526    16371    19293    19850    19286    19294
    24345    19851
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-1
et,4,186
keyo,4,2,1          ! set full integration on SOLID186
eblock,19,solid,,1851
(19i9)
        3        4        3        3        0        0        0        0       20        0     2381    14220    15689    15688    14222    16858    16153    16151    16857
    18541    22915    18552    18540    23930    23925    23926    25157    18542    22919    22916    18553
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-1
/com,*********** Elements for Body 5 "Bolt" ***********
et,5,187
eblock,19,solid,,45
(19i9)
        5        5        5        5        0        0        0        0       10        0      154      653      798      740      659     1290     1679     1281     1277
     1345     1343
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-1
et,6,186
keyo,6,2,1          ! set full integration on SOLID186
eblock,19,solid,,415
(19i9)
        5        6        5        5        0        0        0        0       20        0      199      681      692      694      682      754      756      763      759
     1456     1501     1461     1455     1728     1735     1745     1730     1458     1502     1509     1463
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-1
/com,*********** Elements for Body 7 "Nut" ***********
et,7,187
eblock,19,solid,,22
(19i9)
        7        7        7        7        0        0        0        0       10        0        1        3      129        7      126      191      234      187      190
      575      233
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-1
et,8,186
keyo,8,2,1          ! set full integration on SOLID186
eblock,19,solid,,131
(19i9)
        7        8        7        7        0        0        0        0       20        0       23       10      155      156       18      139      147      146      138
      253      628      316      250      603      609      601      599      252      613      611      315
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-1
/com,*********** Send User Defined Coordinate System(s) ***********
local,12,0,0.,0.,0.,0.,90.,90.
local,13,0,0.,0.,0.,0.,90.,-90.9
csys,0
toffst,459.67,  ! Temperature offset from absolute zero
/com,*********** Set Reference Temperature ***********
tref,70.
/com,*********** Send Materials ***********
MP,EX,1,28999999.9967895,	! slinch s^-2 in^-1
MP,NUXY,1,0.27,
MP,ALPX,1,1e-05,	! F^-1

MP,EX,3,28999999.9967895,	! slinch s^-2 in^-1
MP,NUXY,3,0.27,
MP,ALPX,3,1e-05,	! F^-1

MP,EX,5,28999999.9967895,	! slinch s^-2 in^-1
MP,NUXY,5,0.31,
MP,ALPX,5,9.50000000000001e-06,	! F^-1

MP,EX,7,28999999.9967895,	! slinch s^-2 in^-1
MP,NUXY,7,0.31,
MP,ALPX,7,9.50000000000001e-06,	! F^-1

!************************* Model Summary ********************
!MidNozzle,	300 Series Stainless Steel,	matid,	1
!LowerNozzle,	300 Series Stainless Steel,	matid,	3
!Bolt,	826 Steel,	matid,	5
!Nut,	826 Steel,	matid,	7
!************************* End Model Summary ********************
/com,*********** Create Contact "Bonded - Bolt To Nut" ***********
*set,tid,10
*set,cid,9
r,tid
r,cid
et,tid,170
et,cid,174
eblock,10,,,63
(15i9)
    10326       10       10       10        0     1094     1136     1095     1135     2526     2531     2530     2525
    10327       10       10       10        0     1135     1096     1137     1094     2534     2535     2527     2525
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-1
eblock,10,,,63
(15i9)
    10389        9        9        9        0     1094     1136     1095     1135     2526     2531     2530     2525
    10390        9        9        9        0     1135     1096     1137     1094     2534     2535     2527     2525
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-1
eblock,10,,,35
(15i9)
    10452        9       10        9        0      105      104      103      102      519      515      510      511
    10453        9       10        9        0      102      112      111      105      513      543      524      511
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-1
eblock,10,,,35
(15i9)
    10487       10        9       10        0      105      104      103      102      519      515      510      511
    10488       10        9       10        0      102      112      111      105      513      543      524      511
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-1
keyo,cid,8,2               ! auto create asymmetric contact (from Program Controlled setting)
keyo,cid,10,0              ! adjust contact stiffness each NR iteration (from Program Controlled setting)
keyo,cid,12,5              ! bonded always
keyo,cid,2,0               ! augmented Lagrange (from Program Controlled setting)
keyo,cid,4,0               ! on Gauss point (from Program Controlled setting)
keyo,cid,9,1               ! ignore initial gaps/penetration
keyo,cid,7,0               ! No Prediction
rmod,tid,3,1.       ! FKN
rmod,tid,5,0.       ! ICONT
rmod,tid,6,0.       ! PINB
rmod,tid,10,0.      ! CNOF
rmod,tid,12,0.      ! FKT
rmod,tid,36,64      ! WB DSID
rmod,cid,3,1.       ! FKN
rmod,cid,5,0.       ! ICONT
rmod,cid,6,0.       ! PINB
rmod,cid,10,0.      ! CNOF
rmod,cid,12,0.      ! FKT
rmod,cid,36,64      ! WB DSID
/com,*********** Create Contact "Frictionless - LowerNozzle To MidNozzle" ***********
*set,tid,12
*set,cid,11
r,tid
r,cid
et,tid,170
et,cid,174
eblock,10,,,23
(15i9)
    10522       12       12       12        0    16356    16357    16317    16317    24340    24261    16317    24260
    10523       12       12       12        0    16356    16354    16353    16357    24335    24331    24332    24340
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-1
eblock,10,,,23
(15i9)
    10545       11       11       11        0    16356    16357    16317    16317    24340    24261    16317    24260
    10546       11       11       11        0    16356    16354    16353    16357    24335    24331    24332    24340
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-1
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eblock,10,,,23
(15i9)
    10591       12       11       12        0     5936     5935     4811     4811    14035    12330     4811    12331
    10592       12       11       12        0     5936     5932     5931     5935    14031    14028    14029    14035
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-1
keyo,cid,8,2               ! auto create asymmetric contact (from Program Controlled setting)
keyo,cid,10,0              ! adjust contact stiffness each NR iteration (from Program Controlled setting)
keyo,cid,12,0              ! standard contact
keyo,cid,2,0               ! augmented Lagrange (from Program Controlled setting)
keyo,cid,4,0               ! on Gauss point (from Program Controlled setting)
keyo,cid,9,0               ! use real geometry with stepped effects
keyo,cid,7,0               ! No Prediction
rmod,tid,3,1.       ! FKN
rmod,tid,5,0.       ! ICONT
rmod,tid,6,0.       ! PINB
rmod,tid,10,0.      ! CNOF
rmod,tid,12,0.      ! FKT
rmod,tid,36,67      ! WB DSID
rmod,cid,3,1.       ! FKN
rmod,cid,5,0.       ! ICONT
rmod,cid,6,0.       ! PINB
rmod,cid,10,0.      ! CNOF
rmod,cid,12,0.      ! FKT
rmod,cid,36,67      ! WB DSID
/com,*********** Create Contact "Frictionless - MidNozzle To Bolt" ***********
*set,tid,14
*set,cid,13
r,tid
r,cid
et,tid,170
et,cid,174
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eblock,10,,,12
(15i9)
    10660       14       13       14        0      996      995      994      994     2346     2343      994     2344
    10661       14       13       14        0      996      998      997      995     2349     2351     2347     2346
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-1
keyo,cid,8,2               ! auto create asymmetric contact (from Program Controlled setting)
keyo,cid,10,0              ! adjust contact stiffness each NR iteration (from Program Controlled setting)
keyo,cid,12,0              ! standard contact
keyo,cid,2,0               ! augmented Lagrange (from Program Controlled setting)
keyo,cid,4,0               ! on Gauss point (from Program Controlled setting)
keyo,cid,9,0               ! use real geometry with stepped effects
keyo,cid,7,0               ! No Prediction
rmod,tid,3,1.       ! FKN
rmod,tid,5,0.       ! ICONT
rmod,tid,6,0.       ! PINB
rmod,tid,10,0.      ! CNOF
rmod,tid,12,0.      ! FKT
rmod,tid,36,70      ! WB DSID
rmod,cid,3,1.       ! FKN
rmod,cid,5,0.       ! ICONT
rmod,cid,6,0.       ! PINB
rmod,cid,10,0.      ! CNOF
rmod,cid,12,0.      ! FKT
rmod,cid,36,70      ! WB DSID
/com,*********** Create Contact "Frictionless - LowerNozzle To Nut" ***********
*set,tid,16
*set,cid,15
r,tid
r,cid
et,tid,170
et,cid,174
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eblock,10,,,16
(15i9)
    10726       16       15       16        0       60       63       55       55      422      410       55      408
    10727       16       15       16        0       69       66       71       54      434      435      406      405
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-1
keyo,cid,8,2               ! auto create asymmetric contact (from Program Controlled setting)
keyo,cid,10,0              ! adjust contact stiffness each NR iteration (from Program Controlled setting)
keyo,cid,12,0              ! standard contact
keyo,cid,2,0               ! augmented Lagrange (from Program Controlled setting)
keyo,cid,4,0               ! on Gauss point (from Program Controlled setting)
keyo,cid,9,0               ! use real geometry with stepped effects
keyo,cid,7,0               ! No Prediction
rmod,tid,3,1.       ! FKN
rmod,tid,5,0.       ! ICONT
rmod,tid,6,0.       ! PINB
rmod,tid,10,0.      ! CNOF
rmod,tid,12,0.      ! FKT
rmod,tid,36,73      ! WB DSID
rmod,cid,3,1.       ! FKN
rmod,cid,5,0.       ! ICONT
rmod,cid,6,0.       ! PINB
rmod,cid,10,0.      ! CNOF
rmod,cid,12,0.      ! FKT
rmod,cid,36,73      ! WB DSID
/com,*********** Create Contact "Frictionless - Bolt To Multiple" ***********
*set,tid,18
*set,cid,17
r,tid
r,cid
et,tid,170
et,cid,174
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eblock,10,,,16
(15i9)
    10856       18       17       18        0     4821     4823     3988     3988    12354    10407     3988    10406
    10857       18       17       18        0     4827     4812     4822     4822    12334    12333     4822    12357
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-1
keyo,cid,8,2               ! auto create asymmetric contact (from Program Controlled setting)
keyo,cid,10,0              ! adjust contact stiffness each NR iteration (from Program Controlled setting)
keyo,cid,12,0              ! standard contact
keyo,cid,2,0               ! augmented Lagrange (from Program Controlled setting)
keyo,cid,4,0               ! on Gauss point (from Program Controlled setting)
keyo,cid,9,0               ! use real geometry with stepped effects
keyo,cid,7,0               ! No Prediction
rmod,tid,3,1.       ! FKN
rmod,tid,5,0.       ! ICONT
rmod,tid,6,0.       ! PINB
rmod,tid,10,0.      ! CNOF
rmod,tid,12,0.      ! FKT
rmod,tid,36,92      ! WB DSID
rmod,cid,3,1.       ! FKN
rmod,cid,5,0.       ! ICONT
rmod,cid,6,0.       ! PINB
rmod,cid,10,0.      ! CNOF
rmod,cid,12,0.      ! FKT
rmod,cid,36,92      ! WB DSID
esel,s,ename,,169,178        ! select all contact elements for later inclusion in OUTRES component
cm,_AllContacts,elem
nsel,all
esel,all
/com,********* Frictionless Supports X *********
CMBLOCK,_FRICSUX,NODE,     9290
(8i10)
        19        20        21        22        23        24        25        26
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cmsel,s,_FRICSUX
d,all,ux,0
nsel,all
/com,********* Frictionless Supports Z *********
CMBLOCK,_FRICSUZ,NODE,       29
(8i10)
      3431      3973      3974      4265      4806      4807      5385      5386
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cmsel,s,_FRICSUZ
d,all,uz,0
nsel,all
/com,*********** Node Rotations ***********
nmod,3160,,,,-0.900000000000002,0.,0.
nmod,3161,,,,-0.900000000000002,0.,0.
nmod,3162,,,,-0.900000000000002,0.,0.
nmod,3163,,,,-0.900000000000002,0.,0.
nmod,3164,,,,-0.900000000000002,0.,0.
nmod,3165,,,,-0.900000000000002,0.,0.
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nmod,22324,,,,-0.900000000000002,0.,0.
/com,*********** Define Pressure Using Surface Effect Elements ***********
et,19,154
eblock,10,,,1649
(15i9)
    10872       19       19       19        0     5901     5408     5926     5902    13258    13259    13999    13997
    10873       19       19       19        0     5926     5408     3479     3477    13259     9385     9380     9381
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-1
esel,s,type,,19
esel,all

*DIM,_loadvari309,TABLE,2,4,1,Z,TIME
! Time Values
_loadvari309(0,1,1) = 0.
_loadvari309(0,2,1) = 1.
_loadvari309(0,3,1) = 2.
_loadvari309(0,4,1) = 3.
! Z values
_loadvari309(1,0,1) = 0.
_loadvari309(2,0,1) = 160.
! Load values
_loadvari309(1,1,1) = 0.
_loadvari309(1,2,1) = 0.
_loadvari309(1,3,1) = 12.1699999983526
_loadvari309(1,4,1) = 12.1699999983526
_loadvari309(2,1,1) = 0.
_loadvari309(2,2,1) = 0.
_loadvari309(2,3,1) = 47.7199999935404
_loadvari309(2,4,1) = 47.7199999935404

/com,*********** Define Force Using Surface Effect Elements ***********
local,14,0,0.,0.,0.,0.,0.,0.
csys,0
et,20,154
eblock,10,,,6
(15i9)
    12521       20       20       20       14    17512    17510    17511    17513    26095    26094    26096    26097
    12522       20       20       20       14    17513    16343    16342    17512    24312    24310    24311    26097
    12523       20       20       20       14    17512    16311    16308    17510    24245    24239    24240    26095
    12524       20       20       20       14    16342    16310    16311    17512    24244    24242    24245    24311
    12525       20       20       20       14    17513    15487    15478    16343    22321    22305    22306    24312
    12526       20       20       20       14    17511    15486    15487    17513    22320    22319    22321    26096
-1
esel,s,type,,20
keyop,20,2,1                ! Apply load in local coordinate system
keyop,20,7,1                ! Use original area so load is constant in large deformation
keyop,20,11,2               ! Use real and not project area
esel,all

*DIM,_loadvari311x,TABLE,4,1,1,TIME,
! Time values
_loadvari311x(1,0,1) = 0.
_loadvari311x(2,0,1) = 1.
_loadvari311x(3,0,1) = 2.
_loadvari311x(4,0,1) = 3.
! Load values
_loadvari311x(1,1,1) = 0.
_loadvari311x(2,1,1) = 0.
_loadvari311x(3,1,1) = 0.
_loadvari311x(4,1,1) = 0.


*DIM,_loadvari311y,TABLE,4,1,1,TIME,
! Time values
_loadvari311y(1,0,1) = 0.
_loadvari311y(2,0,1) = 1.
_loadvari311y(3,0,1) = 2.
_loadvari311y(4,0,1) = 3.
! Load values
_loadvari311y(1,1,1) = 0.
_loadvari311y(2,1,1) = 0.
_loadvari311y(3,1,1) = 0.
_loadvari311y(4,1,1) = 0.


*DIM,_loadvari311z,TABLE,4,1,1,TIME,
! Time values
_loadvari311z(1,0,1) = 0.
_loadvari311z(2,0,1) = 1.
_loadvari311z(3,0,1) = 2.
_loadvari311z(4,0,1) = 3.
! Load values
_loadvari311z(1,1,1) = 0.
_loadvari311z(2,1,1) = 0.
_loadvari311z(3,1,1) = -3009.50518328434
_loadvari311z(4,1,1) = -3009.50518328434

/com,*********** Define Force Using Surface Effect Elements ***********
local,15,0,0.,0.,0.,0.,0.,0.
csys,0
et,21,154
eblock,10,,,6
(15i9)
    12527       21       21       21       15     4829     4833     4266     4815    12370    11236    11235    12338
    12528       21       21       21       15     4815     4814     4831     4829    12336    12337    12369    12338
    12529       21       21       21       15     4831     4832     4830     4829    12373    12371    12368    12369
    12530       21       21       21       15     4830     4834     4833     4829    12372    12376    12370    12368
    12531       21       21       21       15     4832     3987     3986     4830    10403    10401    10402    12371
    12532       21       21       21       15     3986     3432     4834     4830     9289     9290    12372    10402
-1
esel,s,type,,21
keyop,21,2,1                ! Apply load in local coordinate system
keyop,21,7,1                ! Use original area so load is constant in large deformation
keyop,21,11,2               ! Use real and not project area
esel,all

*DIM,_loadvari313x,TABLE,4,1,1,TIME,
! Time values
_loadvari313x(1,0,1) = 0.
_loadvari313x(2,0,1) = 1.
_loadvari313x(3,0,1) = 2.
_loadvari313x(4,0,1) = 3.
! Load values
_loadvari313x(1,1,1) = 0.
_loadvari313x(2,1,1) = 0.
_loadvari313x(3,1,1) = 0.
_loadvari313x(4,1,1) = 0.


*DIM,_loadvari313y,TABLE,4,1,1,TIME,
! Time values
_loadvari313y(1,0,1) = 0.
_loadvari313y(2,0,1) = 1.
_loadvari313y(3,0,1) = 2.
_loadvari313y(4,0,1) = 3.
! Load values
_loadvari313y(1,1,1) = 0.
_loadvari313y(2,1,1) = 0.
_loadvari313y(3,1,1) = 0.
_loadvari313y(4,1,1) = 0.


*DIM,_loadvari313z,TABLE,4,1,1,TIME,
! Time values
_loadvari313z(1,0,1) = 0.
_loadvari313z(2,0,1) = 1.
_loadvari313z(3,0,1) = 2.
_loadvari313z(4,0,1) = 3.
! Load values
_loadvari313z(1,1,1) = 0.
_loadvari313z(2,1,1) = 0.
_loadvari313z(3,1,1) = 2016.05730428827
_loadvari313z(4,1,1) = 2016.05730428827

n,26098,0.,0.,0.
/com,*********** Create Bolt Pretension "Bolt Pretension" ***********
*set,_pretnode,26098
_nbolt299 = 26098               ! that will be the pretension node number
local,11,1,0.,56.33,80.0000025531438,-90.,0.,180.
nmod,26098,0,0,0,,,,1      ! move pretension node to bolt center, don't update centroid
CMBLOCK,C0      ,NODE,      176
(8i10)
       911       914       917       918       927       928       929       930
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
cmsel,s,C0
*get,_maxx,node,0,mxloc,x  ! get the radius of the cylinder
nsel,all                   ! select all nodes back because *get,CENTRX needs it
*set,_tid,22
et,_tid,179
type,_tid
real,_tid
mat,_tid
secnum,_tid
esel,s,type,,5
esel,a,type,,6
*get,_necurr,elem,,count    ! get number of elements on body
_ecurr=0                    ! seed value
*do,_i,1,_necurr
  _ecurr = ELNEXT(_ecurr)
  *get,_radius,elem,_ecurr,cent,x
  *if,_radius,gt,_maxx,then
    esel,u,elem,,_ecurr     ! unselect element since not inside cylinder radius
  *endif
*enddo
*set,_wbpstol,1.53006965481521e-003
*get,_echck1,elem,,num,max    ! make sure psmesh command was successful
psmesh,_tid,,26098,all,,11,z,0.0,,_wbpstol,_tid,cmebolt,cmnbolt
*get,_echck2,elem,,num,max    ! make sure psmesh command was successful
*if,_echck1,eq,_echck2,then
  *msg,error
  THE PRETENSION LOAD WAS NOT ABLE TO BE APPLIED. &
  MAKE SURE THE LOAD WAS NOT APPLIED TO A HOLE AND THAT &
  THE LOAD IS NOT APPLIED MORE THAN ONCE PER SURFACE
*endif
esel,all
nsel,all
csys,0
et,23,14             ! spring element type
/com,*********** Construct Weak Springs, Prototype 1 ***********
*set,_delta,4.07671503467848
type,23
mat,24
real,24
r,24,7.63116453673365e-003
nsel,all
*get,_nspr,ndmx
_nspr=_nspr+1
esel,s,type,,1
esel,a,type,,2
nsle,s,active
*get,_minx,node,0,mnloc,x
*get,_miny,node,0,mnloc,y
*get,_minz,node,0,mnloc,z
*get,_maxx,node,0,mxloc,x
*get,_maxy,node,0,mxloc,y
*get,_maxz,node,0,mxloc,z
*dim,_ntets,arra,8
_ntets(1) = NODE(_minx,_miny,_minz)
_ntets(2) = NODE(_minx,_miny,_maxz)
_ntets(3) = NODE(_minx,_maxy,_minz)
_ntets(4) = NODE(_minx,_maxy,_maxz)
_ntets(5) = NODE(_maxx,_miny,_minz)
_ntets(6) = NODE(_maxx,_miny,_maxz)
_ntets(7) = NODE(_maxx,_maxy,_minz)
_ntets(8) = NODE(_maxx,_maxy,_maxz)
*do,_i,1,8
  n,_nspr,nx(_ntets(_i))+_delta,ny(_ntets(_i)),nz(_ntets(_i))
  e,_ntets(_i),_nspr
  d,_nspr,all
  _nspr=_nspr+1
  n,_nspr,nx(_ntets(_i)),ny(_ntets(_i))+_delta,nz(_ntets(_i))
  e,_ntets(_i),_nspr
  d,_nspr,all
  _nspr=_nspr+1
  n,_nspr,nx(_ntets(_i)),ny(_ntets(_i)),nz(_ntets(_i))+_delta
  e,_ntets(_i),_nspr
  d,_nspr,all
  _nspr=_nspr+1
*enddo
*set,_ntets
nsel,all
esel,all
/com,*********** Construct Weak Springs, Prototype 2 ***********
*set,_delta,4.06455504362747
type,23
mat,25
real,25
r,25,7.99810992833124e-003
nsel,all
*get,_nspr,ndmx
_nspr=_nspr+1
esel,s,type,,3
esel,a,type,,4
nsle,s,active
*get,_minx,node,0,mnloc,x
*get,_miny,node,0,mnloc,y
*get,_minz,node,0,mnloc,z
*get,_maxx,node,0,mxloc,x
*get,_maxy,node,0,mxloc,y
*get,_maxz,node,0,mxloc,z
*dim,_ntets,arra,8
_ntets(1) = NODE(_minx,_miny,_minz)
_ntets(2) = NODE(_minx,_miny,_maxz)
_ntets(3) = NODE(_minx,_maxy,_minz)
_ntets(4) = NODE(_minx,_maxy,_maxz)
_ntets(5) = NODE(_maxx,_miny,_minz)
_ntets(6) = NODE(_maxx,_miny,_maxz)
_ntets(7) = NODE(_maxx,_maxy,_minz)
_ntets(8) = NODE(_maxx,_maxy,_maxz)
*do,_i,1,8
  n,_nspr,nx(_ntets(_i))+_delta,ny(_ntets(_i)),nz(_ntets(_i))
  e,_ntets(_i),_nspr
  d,_nspr,all
  _nspr=_nspr+1
  n,_nspr,nx(_ntets(_i)),ny(_ntets(_i))+_delta,nz(_ntets(_i))
  e,_ntets(_i),_nspr
  d,_nspr,all
  _nspr=_nspr+1
  n,_nspr,nx(_ntets(_i)),ny(_ntets(_i)),nz(_ntets(_i))+_delta
  e,_ntets(_i),_nspr
  d,_nspr,all
  _nspr=_nspr+1
*enddo
*set,_ntets
nsel,all
esel,all
/com,*********** Construct Weak Springs, Prototype 3 ***********
*set,_delta,7.65034827407604e-002
type,23
mat,26
real,26
r,26,1.54976643322443e-003
nsel,all
*get,_nspr,ndmx
_nspr=_nspr+1
esel,s,type,,5
esel,a,type,,6
nsle,s,active
*get,_minx,node,0,mnloc,x
*get,_miny,node,0,mnloc,y
*get,_minz,node,0,mnloc,z
*get,_maxx,node,0,mxloc,x
*get,_maxy,node,0,mxloc,y
*get,_maxz,node,0,mxloc,z
*dim,_ntets,arra,8
_ntets(1) = NODE(_minx,_miny,_minz)
_ntets(2) = NODE(_minx,_miny,_maxz)
_ntets(3) = NODE(_minx,_maxy,_minz)
_ntets(4) = NODE(_minx,_maxy,_maxz)
_ntets(5) = NODE(_maxx,_miny,_minz)
_ntets(6) = NODE(_maxx,_miny,_maxz)
_ntets(7) = NODE(_maxx,_maxy,_minz)
_ntets(8) = NODE(_maxx,_maxy,_maxz)
*do,_i,1,8
  n,_nspr,nx(_ntets(_i))+_delta,ny(_ntets(_i)),nz(_ntets(_i))
  e,_ntets(_i),_nspr
  d,_nspr,all
  _nspr=_nspr+1
  n,_nspr,nx(_ntets(_i)),ny(_ntets(_i))+_delta,nz(_ntets(_i))
  e,_ntets(_i),_nspr
  d,_nspr,all
  _nspr=_nspr+1
  n,_nspr,nx(_ntets(_i)),ny(_ntets(_i)),nz(_ntets(_i))+_delta
  e,_ntets(_i),_nspr
  d,_nspr,all
  _nspr=_nspr+1
*enddo
*set,_ntets
nsel,all
esel,all
/com,*********** Construct Weak Springs, Prototype 4 ***********
*set,_delta,3.13000126763641e-002
type,23
mat,27
real,27
r,27,1.41917533890129e-003
nsel,all
*get,_nspr,ndmx
_nspr=_nspr+1
esel,s,type,,7
esel,a,type,,8
nsle,s,active
*get,_minx,node,0,mnloc,x
*get,_miny,node,0,mnloc,y
*get,_minz,node,0,mnloc,z
*get,_maxx,node,0,mxloc,x
*get,_maxy,node,0,mxloc,y
*get,_maxz,node,0,mxloc,z
*dim,_ntets,arra,8
_ntets(1) = NODE(_minx,_miny,_minz)
_ntets(2) = NODE(_minx,_miny,_maxz)
_ntets(3) = NODE(_minx,_maxy,_minz)
_ntets(4) = NODE(_minx,_maxy,_maxz)
_ntets(5) = NODE(_maxx,_miny,_minz)
_ntets(6) = NODE(_maxx,_miny,_maxz)
_ntets(7) = NODE(_maxx,_maxy,_minz)
_ntets(8) = NODE(_maxx,_maxy,_maxz)
*do,_i,1,8
  n,_nspr,nx(_ntets(_i))+_delta,ny(_ntets(_i)),nz(_ntets(_i))
  e,_ntets(_i),_nspr
  d,_nspr,all
  _nspr=_nspr+1
  n,_nspr,nx(_ntets(_i)),ny(_ntets(_i))+_delta,nz(_ntets(_i))
  e,_ntets(_i),_nspr
  d,_nspr,all
  _nspr=_nspr+1
  n,_nspr,nx(_ntets(_i)),ny(_ntets(_i)),nz(_ntets(_i))+_delta
  e,_ntets(_i),_nspr
  d,_nspr,all
  _nspr=_nspr+1
*enddo
*set,_ntets
nsel,all
esel,all
/com,*********** Define Body Force Temperature ***********
esel,none
esel,a,type,,1
esel,a,type,,2,8
cm,_CM297,elem
esel,all

*DIM,_loadvari297,TABLE,4,1,1,TIME,
! Time values
_loadvari297(1,0,1) = 0.
_loadvari297(2,0,1) = 1.
_loadvari297(3,0,1) = 2.
_loadvari297(4,0,1) = 3.
! Load values
_loadvari297(1,1,1) = 70.
_loadvari297(2,1,1) = 70.
_loadvari297(3,1,1) = 70.
_loadvari297(4,1,1) = 700.

esel,all
fini
/com,****************************************************************************
/com,*************************    SOLUTION       ********************************
/com,****************************************************************************
/solu
antype,0                   ! static analysis
eqsl,sparse,,,,,1
cntr,print,1               ! print out contact info and also make no initial contact an error
dmpoption,emat,no             ! Don't combine emat file for DANSYS
dmpoption,esav,no             ! Don't combine esav file for DANSYS
nldiag,cont,iter           ! print out contact info each equilibrium iteration
rescontrol,define,last,last,,dele	   ! Program Controlled
/com,****************************************************
/com,******************* SOLVE FOR LS 1 OF 3 ****************
esel,s,type,,19
nsle
sf,all,pres,%_loadvari309%
nsel,all
esel,all
esel,s,type,,20
nsle
sfe,all,1,pres,1,%_loadvari311x%
sfe,all,2,pres,1,%_loadvari311y%
sfe,all,3,pres,1,%_loadvari311z%
esel,s,type,,21
nsle
sfe,all,1,pres,1,%_loadvari313x%
sfe,all,2,pres,1,%_loadvari313y%
sfe,all,3,pres,1,%_loadvari313z%
nsel,all
esel,all
esel,all
cmsel,s,_CM297
nsle
bf,all,temp,%_loadvari297%
nsel,all
esel,all
f,26098,fx,2319.99999960674
autots,on                  ! Workbench Program Controlled automatic time stepping
nsub,1,10,1                ! due to presence of general nonlinear
time,1.
outres,erase
outres,all,none
outres,nsol,last,
outres,rsol,last
outres,nload,last,
outres,eangl,last
outres,fmag,last
outres,curd,last
outres,nldat,last
outres,eheat,last
outres,etmp,last
outres,srfs,last
outres,cont,last
outres,bkstr,last
outres,veng,last
outres,strs,last,
outres,eangl,last
outres,fmag,last
outres,curd,last
outres,nldat,last
outres,eheat,last
outres,etmp,last
outres,srfs,last
outres,cont,last
outres,bkstr,last
outres,veng,last
outres,epel,last,
outres,eppl,last,
outres,eangl,last
outres,fmag,last
outres,curd,last
outres,nldat,last
outres,eheat,last
outres,etmp,last
outres,srfs,last
outres,cont,last
outres,bkstr,last
outres,veng,last
outres,epth,last,
outres,misc,last,_AllContacts
outres,eangl,last,_AllContacts
outres,fmag,last,_AllContacts
outres,curd,last,_AllContacts
outres,nldat,last,_AllContacts
outres,eheat,last,_AllContacts
outres,etmp,last,_AllContacts
outres,srfs,last,_AllContacts
outres,cont,last,_AllContacts
outres,bkstr,last,_AllContacts
outres,veng,last,_AllContacts
stabilize,off                   ! Stabilization turned OFF by user
! *********** WB SOLVE COMMAND ***********
! check interactive state
*get,ANSINTER_,active,,int
*if,ANSINTER_,ne,0,then
/eof
*endif
solve
/com *************** Write FE CONNECTORS *********
CEWRITE,file,ce,,INTE
/com,****************************************************
/com,*************** FINISHED SOLVE FOR LS 1 *************
/com,****************************************************
/com,******************* SOLVE FOR LS 2 OF 3 ****************
esel,all
fdel,26098,all
d,26098,ux,%_FIX%
autots,on                  ! Workbench Program Controlled automatic time stepping
nsub,1,10,1                ! due to presence of general nonlinear
time,2.
outres,erase
outres,all,none
outres,nsol,all,
outres,rsol,all
outres,nload,all,
outres,eangl,all
outres,fmag,all
outres,curd,all
outres,nldat,all
outres,eheat,all
outres,etmp,all
outres,srfs,all
outres,cont,all
outres,bkstr,all
outres,veng,all
outres,strs,all,
outres,epel,all,
outres,eppl,all,
outres,epth,all,
outres,misc,all,_AllContacts
stabilize,off                   ! Stabilization turned OFF by user
solve
/com,****************************************************
/com,*************** FINISHED SOLVE FOR LS 2 *************
/com,****************************************************
/com,******************* SOLVE FOR LS 3 OF 3 ****************
esel,all
fdel,26098,all
d,26098,ux,%_FIX%
autots,on                  ! Workbench Program Controlled automatic time stepping
nsub,1,10,1                ! due to presence of general nonlinear
time,3.
outres,erase
outres,all,none
outres,nsol,all,
outres,rsol,all
outres,nload,all,
outres,eangl,all
outres,fmag,all
outres,curd,all
outres,nldat,all
outres,eheat,all
outres,etmp,all
outres,srfs,all
outres,cont,all
outres,bkstr,all
outres,veng,all
outres,strs,all,
outres,epel,all,
outres,eppl,all,
outres,epth,all,
outres,misc,all,_AllContacts
stabilize,off                   ! Stabilization turned OFF by user
solve
/com,****************************************************
/com,*************** FINISHED SOLVE FOR LS 3 *************
/post1
fini
